# OpenSim document version 20303
Model:
  BodySet:
    Body femur_r:
      WrapCylinder FRWrapJointr: xyz_body_rotation=(1.57 0 0) translation=(0 0 -0.403) radius=0.036 length=0.5
          quadrant=+x
    Body femur_l:
      WrapCylinder FRWrapJointl: xyz_body_rotation=(1.57 0 0) translation=(0 0 0.403) radius=0.036 length=0.5
          quadrant=+x
  ForceSet:
    Thelen2003Muscle [values shared by the 25 below unless stated]: min_control=0 max_control=1 optimal_force=1
        max_contraction_velocity=10 activation_time_constant=0.01 deactivation_time_constant=0.04
        FmaxTendonStrain=0.033 FmaxMuscleStrain=0.6 KshapeActive=0.5 KshapePassive=4 Af=0.3 Flen=1.8
    Thelen2003Muscle semimem_r: max_isometric_force=1288 optimal_fiber_length=0.08 tendon_slack_length=0.359
        pennation_angle_at_optimal=0.2617994
      PathPoint P1: pelvis (-0.1192 -0.07151 -0.09747)
      PathPoint P2: tibia_r (-0.0348 0.01891 -0.03519)
      PathPoint P3: tibia_r (-0.027 0.01957 -0.04771)
    Thelen2003Muscle semiten_r: max_isometric_force=410 optimal_fiber_length=0.201 tendon_slack_length=0.2555
        pennation_angle_at_optimal=0.08726646
      PathPoint P1: pelvis (-0.12635 -0.06039 -0.10988)
      PathPoint P2: tibia_r (-0.04203 0.02277 -0.02859)
      PathPoint P3: tibia_r (-0.03322 0.02288 -0.05282)
      PathPoint P4: tibia_r (-0.0113 0.0245 -0.0746)
      PathPoint P5: tibia_r (0.0027 0.0193 -0.0956)
    Thelen2003Muscle bifemlh_r: max_isometric_force=896 optimal_fiber_length=0.109 tendon_slack_length=0.326
        pennation_angle_at_optimal=0
      PathPoint P1: pelvis (-0.12596 -0.06944 -0.10257)
      PathPoint P2: tibia_r (-0.0301 -0.02943 -0.036)
      PathPoint P3: tibia_r (-0.0234 -0.0343 -0.0563)
    Thelen2003Muscle bifemsh_r: max_isometric_force=804 optimal_fiber_length=0.173 tendon_slack_length=0.089
        pennation_angle_at_optimal=0.4014257
      PathPoint P1: femur_r (0.005 -0.0234 -0.2111)
      PathPoint P2: tibia_r (-0.0301 -0.02943 -0.036)
      PathPoint P3: tibia_r (-0.0234 -0.0343 -0.0563)
    Thelen2003Muscle glut_max2_r: max_isometric_force=819 optimal_fiber_length=0.147 tendon_slack_length=0.127
        pennation_angle_at_optimal=0
      PathPoint P1: pelvis (-0.1349 -0.0563 0.0176)
      PathPoint P2: pelvis (-0.1376 -0.0914 -0.052)
      PathPoint P3: femur_r (-0.0426 -0.0293 -0.053)
      PathPoint P4: femur_r (-0.0156 -0.0419 -0.1016)
    Thelen2003Muscle iliacus_r: max_isometric_force=1073 optimal_fiber_length=0.1 tendon_slack_length=0.1
        pennation_angle_at_optimal=0.1221731
      PathPoint P1: pelvis (-0.0674 -0.0854 0.0365)
      PathPoint P2: pelvis (-0.0258 -0.0811 -0.055)
      PathPoint P3: pelvis (-0.0288 -0.0816 -0.0805)
      PathPoint P4: femur_r (0.0017 -0.0057 -0.0543)
      PathPoint P5: femur_r (-0.0193 -0.0129 -0.0621)
    Thelen2003Muscle rect_fem_r: max_isometric_force=1169 optimal_fiber_length=0.114 tendon_slack_length=0.31
        pennation_angle_at_optimal=0.08726646
      PathPoint P1: pelvis (-0.0295 -0.0968 -0.0311)
      PathPoint P3: tibia_r (0.0422074 -0.0014 0.0242373)
      PathWrap FRWrapJointr-rect_fem_r-pw: wrap_object=FRWrapJointr method=midpoint
    Thelen2003Muscle vas_lat_r: max_isometric_force=1871 optimal_fiber_length=0.084 tendon_slack_length=0.157
        pennation_angle_at_optimal=0.08726646
      PathPoint P1: femur_r (0.0048 -0.0349 -0.1854)
      PathPoint P2: femur_r (0.0269 -0.0409 -0.2591)
      PathPoint P5: tibia_r (0.0408785 -0.0165 0.0223842)
      PathWrap FRWrapJointr-vas_lat_r-pw: wrap_object=FRWrapJointr method=midpoint
    Thelen2003Muscle med_gas_r: max_isometric_force=1558 optimal_fiber_length=0.06 tendon_slack_length=0.39
        pennation_angle_at_optimal=0.296706
      PathPoint P1: femur_r (-0.019 0.0235 -0.3929)
      PathPoint P2: femur_r (-0.03 0.0258 -0.4022)
      PathPoint P3: calcn_r (0 0.0053 0.031)
    Thelen2003Muscle lat_gas_r: max_isometric_force=683 optimal_fiber_length=0.064 tendon_slack_length=0.38
        pennation_angle_at_optimal=0.1396263
      PathPoint P1: femur_r (-0.022 -0.0272 -0.3946)
      PathPoint P2: femur_r (-0.03 -0.0274 -0.4018)
      PathPoint P3: calcn_r (0 0.0053 0.031)
    Thelen2003Muscle soleus_r: max_isometric_force=3549 optimal_fiber_length=0.05 tendon_slack_length=0.25
        pennation_angle_at_optimal=0.4363323
      PathPoint P1: tibia_r (-0.0024 -0.0071 -0.1533)
      PathPoint P2: calcn_r (0 0.0053 0.031)
    Thelen2003Muscle tib_ant_r: max_isometric_force=905 optimal_fiber_length=0.098 tendon_slack_length=0.223
        pennation_angle_at_optimal=0.08726646
      PathPoint P1: tibia_r (0.0179 -0.0115 -0.1624)
      PathPoint P2: tibia_r (0.0329 0.0177 -0.3951)
      PathPoint P3: calcn_r (0.1166 0.0305 0.0178)
    Thelen2003Muscle semimem_l: max_isometric_force=1288 optimal_fiber_length=0.08 tendon_slack_length=0.359
        pennation_angle_at_optimal=0.2617994
      PathPoint P1: pelvis (-0.1192 0.07151 -0.09747)
      PathPoint P2: tibia_l (-0.0348 -0.01891 -0.03519)
      PathPoint P3: tibia_l (-0.027 -0.01957 -0.04771)
    Thelen2003Muscle semiten_l: max_isometric_force=410 optimal_fiber_length=0.201 tendon_slack_length=0.2555
        pennation_angle_at_optimal=0.08726646
      PathPoint P1: pelvis (-0.12635 0.06039 -0.10988)
      PathPoint P2: tibia_l (-0.04203 -0.02277 -0.02859)
      PathPoint P3: tibia_l (-0.03322 -0.02288 -0.05282)
      PathPoint P4: tibia_l (-0.0113 -0.0245 -0.0746)
      PathPoint P5: tibia_l (0.0027 -0.0193 -0.0956)
    Thelen2003Muscle bifemlh_l: max_isometric_force=896 optimal_fiber_length=0.109 tendon_slack_length=0.326
        pennation_angle_at_optimal=0
      PathPoint P1: pelvis (-0.12596 0.06944 -0.10257)
      PathPoint P2: tibia_l (-0.0301 0.02943 -0.036)
      PathPoint P3: tibia_l (-0.0234 0.0343 -0.0563)
    Thelen2003Muscle bifemsh_l: max_isometric_force=804 optimal_fiber_length=0.173 tendon_slack_length=0.089
        pennation_angle_at_optimal=0.4014257
      PathPoint P1: femur_l (0.005 0.0234 -0.2111)
      PathPoint P2: tibia_l (-0.0301 0.02943 -0.036)
      PathPoint P3: tibia_l (-0.0234 0.0343 -0.0563)
    Thelen2003Muscle glut_max2_l: max_isometric_force=819 optimal_fiber_length=0.147 tendon_slack_length=0.127
        pennation_angle_at_optimal=0
      PathPoint P1: pelvis (-0.1349 0.0563 0.0176)
      PathPoint P2: pelvis (-0.1376 0.0914 -0.052)
      PathPoint P3: femur_l (-0.0426 0.0293 -0.053)
      PathPoint P4: femur_l (-0.0156 0.0419 -0.1016)
    Thelen2003Muscle iliacus_l: max_isometric_force=1073 optimal_fiber_length=0.1 tendon_slack_length=0.1
        pennation_angle_at_optimal=0.1221731
      PathPoint P1: pelvis (-0.0674 0.0854 0.0365)
      PathPoint P2: pelvis (-0.0258 0.0811 -0.055)
      PathPoint P3: pelvis (-0.0288 0.0816 -0.0805)
      PathPoint P4: femur_l (0.0017 0.0057 -0.0543)
      PathPoint P5: femur_l (-0.0193 0.0129 -0.0621)
    Thelen2003Muscle gem_l: max_isometric_force=164 optimal_fiber_length=0.024 tendon_slack_length=0.039
        pennation_angle_at_optimal=0
      PathPoint P1: pelvis (-0.1133 0.0714 -0.082)
      PathPoint P2: femur_l (-0.0142 0.0443 -0.0033)
    Thelen2003Muscle rect_fem_l: max_isometric_force=1169 optimal_fiber_length=0.114 tendon_slack_length=0.31
        pennation_angle_at_optimal=0.08726646
      PathPoint P1: pelvis (-0.0295 0.0968 -0.0311)
      PathPoint P3: tibia_l (0.0422074 0.0014 0.0242373)
      PathWrap FRWrapJointl-rect_fem_l-pw: wrap_object=FRWrapJointl method=midpoint
    Thelen2003Muscle vas_lat_l: max_isometric_force=1871 optimal_fiber_length=0.084 tendon_slack_length=0.157
        pennation_angle_at_optimal=0.08726646
      PathPoint P1: femur_l (0.0048 0.0349 -0.1854)
      PathPoint P2: femur_l (0.0269 0.0409 -0.2591)
      PathPoint P5: tibia_l (0.0408785 0.0165 0.0223842)
      PathWrap FRWrapJointl-vas_lat_l-pw: wrap_object=FRWrapJointl method=midpoint
    Thelen2003Muscle med_gas_l: max_isometric_force=1558 optimal_fiber_length=0.06 tendon_slack_length=0.39
        pennation_angle_at_optimal=0.296706
      PathPoint P1: femur_l (-0.019 -0.0235 -0.3929)
      PathPoint P2: femur_l (-0.03 -0.0258 -0.4022)
      PathPoint P3: calcn_l (0 -0.0053 0.031)
    Thelen2003Muscle lat_gas_l: max_isometric_force=683 optimal_fiber_length=0.064 tendon_slack_length=0.38
        pennation_angle_at_optimal=0.1396263
      PathPoint P1: femur_l (-0.022 0.0272 -0.3946)
      PathPoint P2: femur_l (-0.03 0.0274 -0.4018)
      PathPoint P3: calcn_l (0 -0.0053 0.031)
    Thelen2003Muscle soleus_l: max_isometric_force=3549 optimal_fiber_length=0.05 tendon_slack_length=0.25
        pennation_angle_at_optimal=0.4363323
      PathPoint P1: tibia_l (-0.0024 0.0071 -0.1533)
      PathPoint P2: calcn_l (0 -0.0053 0.031)
    Thelen2003Muscle tib_ant_l: max_isometric_force=905 optimal_fiber_length=0.098 tendon_slack_length=0.223
        pennation_angle_at_optimal=0.08726646
      PathPoint P1: tibia_l (0.0179 0.0115 -0.1624)
      PathPoint P2: tibia_l (0.0329 -0.0177 -0.3951)
      PathPoint P3: calcn_l (0.1166 -0.0305 0.0178)
