# OpenSim document version 20303
Model:
  ForceSet:
    Thelen2003Muscle ercspn_r: min_control=0 max_control=1 optimal_force=1 max_isometric_force=2500
        optimal_fiber_length=0.12 tendon_slack_length=0.03 pennation_angle_at_optimal=0 max_contraction_velocity=10
        activation_time_constant=0.01 deactivation_time_constant=0.04 FmaxTendonStrain=0.033 FmaxMuscleStrain=0.6
        KshapeActive=0.5 KshapePassive=4 Af=0.3 Flen=1.8
      PathPoint P1: pelvis (-0.14 -0.0436 0.0439)
      PathPoint P2: torso (-0.055 -0.0241 0.11)
    Thelen2003Muscle intobl_r: min_control=0 max_control=1 optimal_force=1 max_isometric_force=900
        optimal_fiber_length=0.1 tendon_slack_length=0.1 pennation_angle_at_optimal=0 max_contraction_velocity=10
        activation_time_constant=0.01 deactivation_time_constant=0.04 FmaxTendonStrain=0.033 FmaxMuscleStrain=0.6
        KshapeActive=0.5 KshapePassive=4 Af=0.3 Flen=1.8
      PathPoint P1: pelvis (-0.04 -0.1157 0.07)
      PathPoint P2: torso (0.07 -0.015 0.16)
    Thelen2003Muscle extobl_r: min_control=0 max_control=1 optimal_force=1 max_isometric_force=900
        optimal_fiber_length=0.12 tendon_slack_length=0.14 pennation_angle_at_optimal=0 max_contraction_velocity=10
        activation_time_constant=0.01 deactivation_time_constant=0.04 FmaxTendonStrain=0.033 FmaxMuscleStrain=0.6
        KshapeActive=0.5 KshapePassive=4 Af=0.3 Flen=1.8
      PathPoint P1: pelvis (-0.03 -0.01 -0.0636)
      PathPoint P2: torso (0.065 -0.11 0.11)
